Mon Oct 16 13:34:28 CEST 2017
;; 1. Based on:     000
;; 2. Description:
;;    NONMEM PK example for xpose
$PROBLEM    Parameter estimation
$INPUT      ID=FOO DOSE DV SCR AGE SEX CLASS WT ACE MED1 MED2 TAD TIME
            CLCR AMT SS II EVID
$DATA      ../../mx19_2.csv IGNORE=@
$ABBREVIATED DERIV2=NO
$SUBROUTINE ADVAN2 TRANS1
$PK

 TVCL    = THETA(1)*(1+THETA(7)*(CLCR-65))
 TVV     = THETA(2)*WT
 CL      = TVCL*EXP(ETA(1))
 V       = TVV*EXP(ETA(2))
 KA      = THETA(3)*EXP(ETA(3))
 ALAG1   = THETA(4)
 K       = CL/V

$ERROR

 A1      = A(1)
 A2      = A(2)
 IPRED   = A2/V
 IRES    = IPRED-DV
 W       = THETA(5)*IPRED + THETA(6)
 IWRES   = IRES/W
 Y       = IPRED + W*EPS(1)

$THETA  (0,25.3534885677044) ; TVCL
$THETA  (0,1.46525179248385) ; TVV
$THETA  (0,7.45218812138601) ; TVKA
$THETA  (0,0.214386003487195) ; LAG
$THETA  (0,0.200119421532605) ; Prop. Err
$THETA  (0,0.00982738723090614) ; Add. Err
$THETA  (0,0.00600636092642297,.02941) ; CRCL on CL
$OMEGA  0.0739818167719198  ;     IIV CL
$OMEGA  0.0388708948819366  ;      IIV V
$OMEGA  2.37976675789493  ;     IIV KA
$SIGMA  1  FIX
$ESTIMATION METHOD=1 INTER MAXEVALS=9999 PRINT=1 NOABORT MSFO=msf004
$COVARIANCE PRINT=E
$TABLE      ID DOSE AMT SS II TIME TAD IPRED CWRES CPRED IWRES EVID A1
            A2 ONEHEADER NOPRINT FILE=sdtab004 ; Simple table
$TABLE      ID SEX MED1 MED2 ONEHEADER NOPRINT NOAPPEND
            FORMAT=,1PE11.4 FILE=catab004.csv ; Table in csv format
$TABLE      ID CLCR AGE WT ONEHEADER FIRSTONLY NOPRINT NOAPPEND
            FILE=cotab004 ; Table with firstonly option
$TABLE      ID KA CL V ALAG1 ETAS(1:LAST) FIRSTONLY ONEHEADER NOPRINT
            NOAPPEND FILE=patab004 ; Table with firstonly option

; Problem no. 2

$PROBLEM    Model simulations
$INPUT      ID DOSE DV SCR AGE SEX CLASS WT ACE MED1 MED2 TAD TIME
            CLCR AMT SS II EVID
$DATA      ../../mx19_2.csv IGNORE=@ REWIND
$MSFI      msf004
$SIMULATION (221287) ONLYSIM NSUB=20 ; Small sim for illustration only
$TABLE      ID DV IPRED DOSE AMT TIME TAD EVID SEX CLCR AGE WT
            ONEHEADER NOPRINT NOAPPEND FILE=simtab004 ; Simulation table

NM-TRAN MESSAGES
 WARNINGS AND ERRORS (IF ANY) FOR PROBLEM    1
 (WARNING  2) NM-TRAN INFERS THAT THE DATA ARE POPULATION.
 WARNINGS AND ERRORS (IF ANY) FOR PROBLEM    2
 (WARNING  2) NM-TRAN INFERS THAT THE DATA ARE POPULATION.
 (WARNING  22) WITH $MSFI AND "SUBPROBS", "TRUE=FINAL" IS ALSO REQUIRED ON
 $SIMUL RECORD. NM-TRAN HAS SUPPLIED THIS OPTION.

1NONLINEAR MIXED EFFECTS MODEL PROGRAM (NONMEM) VERSION 7.3.0
 ORIGINALLY DEVELOPED BY STUART BEAL, LEWIS SHEINER, AND ALISON BOECKMANN
 CURRENT DEVELOPERS ARE ROBERT BAUER, ICON DEVELOPMENT SOLUTIONS,
 AND ALISON BOECKMANN. IMPLEMENTATION, EFFICIENCY, AND STANDARDIZATION
 PERFORMED BY NOUS INFOSYSTEMS.
 PROBLEM NO.:         1
 Parameter estimation
 TOT. NO. OF OBS RECS:      476
 TOT. NO. OF INDIVIDUALS:     74
 ONE COMPARTMENT MODEL WITH FIRST-ORDER ABSORPTION (ADVAN2)
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 #TBLN:      1
 #METH: First Order Conditional Estimation with Interaction
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
 #TERM:
0MINIMIZATION SUCCESSFUL
 NO. OF FUNCTION EVALUATIONS USED:      245
 NO. OF SIG. DIGITS IN FINAL EST.:  3.3

 ETABAR IS THE ARITHMETIC MEAN OF THE ETA-ESTIMATES,
 AND THE P-VALUE IS GIVEN FOR THE NULL HYPOTHESIS THAT THE TRUE MEAN IS 0.

 ETABAR:         1.2889E-02 -2.2712E-02 -2.5271E-01
 SE:             2.8276E-02  1.6048E-02  1.2173E-01
 N:                      74          74          74

 P VAL.:         6.4851E-01  1.5700E-01  3.7900E-02

 ETAshrink(%):   9.3289E+00  2.8715E+01  2.3651E+01
 EBVshrink(%):   8.2266E+00  2.8532E+01  2.1238E+01
 EPSshrink(%):   1.4855E+01

 #TERE:
 Elapsed estimation time in seconds:     2.26
 Elapsed covariance time in seconds:     2.98

 ********************               FIRST ORDER CONDITIONAL ESTIMATION WITH INTERACTION              ********************
 #OBJT:**************                       MINIMUM VALUE OF OBJECTIVE FUNCTION                      ********************
 #OBJV:********************************************    -1403.905       **************************************************

 ********************               FIRST ORDER CONDITIONAL ESTIMATION WITH INTERACTION              ********************
 ********************                             FINAL PARAMETER ESTIMATE                           ********************

 THETA - VECTOR OF FIXED EFFECTS PARAMETERS   *********
         TH 1      TH 2      TH 3      TH 4      TH 5      TH 6      TH 7
         2.63E+01  1.35E+00  4.20E+00  2.08E-01  2.05E-01  1.06E-02  7.17E-03

 OMEGA - COV MATRIX FOR RANDOM EFFECTS - ETAS  ********
            ETA1      ETA2      ETA3
 ETA1
+        7.30E-02
 ETA2
+        0.00E+00  3.80E-02
 ETA3
+        0.00E+00  0.00E+00  1.91E+00

 SIGMA - COV MATRIX FOR RANDOM EFFECTS - EPSILONS  ****
            EPS1
 EPS1
+        1.00E+00

 OMEGA - CORR MATRIX FOR RANDOM EFFECTS - ETAS  *******
            ETA1      ETA2      ETA3
 ETA1
+        2.70E-01
 ETA2
+        0.00E+00  1.95E-01
 ETA3
+        0.00E+00  0.00E+00  1.38E+00

 SIGMA - CORR MATRIX FOR RANDOM EFFECTS - EPSILONS  ***
            EPS1
 EPS1
+        1.00E+00

 ********************               FIRST ORDER CONDITIONAL ESTIMATION WITH INTERACTION              ********************
 ********************                            STANDARD ERROR OF ESTIMATE                          ********************

 THETA - VECTOR OF FIXED EFFECTS PARAMETERS   *********
         TH 1      TH 2      TH 3      TH 4      TH 5      TH 6      TH 7
         8.91E-01  4.38E-02  8.09E-01  1.57E-02  2.24E-02  3.66E-03  1.70E-03

 OMEGA - COV MATRIX FOR RANDOM EFFECTS - ETAS  ********
            ETA1      ETA2      ETA3
 ETA1
+        1.26E-02
 ETA2
+       .........  1.25E-02
 ETA3
+       ......... .........  5.58E-01

 SIGMA - COV MATRIX FOR RANDOM EFFECTS - EPSILONS  ****
            EPS1
 EPS1
+       .........

 OMEGA - CORR MATRIX FOR RANDOM EFFECTS - ETAS  *******
            ETA1      ETA2      ETA3
 ETA1
+        2.33E-02
 ETA2
+       .........  3.20E-02
 ETA3
+       ......... .........  2.02E-01

 SIGMA - CORR MATRIX FOR RANDOM EFFECTS - EPSILONS  ***
            EPS1
 EPS1
+       .........

 ********************               FIRST ORDER CONDITIONAL ESTIMATION WITH INTERACTION              ********************
 ********************                          COVARIANCE MATRIX OF ESTIMATE                         ********************

            TH 1      TH 2      TH 3      TH 4      TH 5      TH 6      TH 7      OM11      OM12      OM13      OM22      OM23
             OM33      SG11
 TH 1
+        7.95E-01
 TH 2
+        2.05E-02  1.92E-03
 TH 3
+        7.22E-02 -8.30E-03  6.55E-01
 TH 4
+       -3.45E-03 -6.42E-05  3.22E-03  2.47E-04
 TH 5
+        8.71E-04  2.53E-04 -4.71E-03 -5.79E-05  5.04E-04
 TH 6
+        6.30E-04 -3.17E-06 -6.52E-04 -1.53E-05 -3.14E-05  1.34E-05
 TH 7
+       -3.30E-04  5.46E-06 -3.15E-04  2.46E-06  3.15E-06 -1.58E-06  2.88E-06
 OM11
+       -1.29E-03 -7.97E-05  1.68E-03 -2.75E-05 -8.26E-05  1.13E-05 -1.66E-06  1.58E-04
 OM12
+       ......... ......... ......... ......... ......... ......... ......... ......... .........
 OM13
+       ......... ......... ......... ......... ......... ......... ......... ......... ......... .........
 OM22
+       -1.23E-03 -1.27E-05 -1.33E-03 -1.47E-05 -1.03E-04  1.02E-05  1.67E-06  6.68E-05 ......... .........  1.56E-04
 OM23
+       ......... ......... ......... ......... ......... ......... ......... ......... ......... ......... ......... .........
 OM33
+        7.69E-02 -7.23E-03  3.74E-01  1.79E-03 -2.85E-03  1.18E-05 -2.54E-04  1.61E-03 ......... ......... -9.03E-04 .........
          3.12E-01
 SG11
+       ......... ......... ......... ......... ......... ......... ......... ......... ......... ......... ......... .........
         ......... .........

 ********************               FIRST ORDER CONDITIONAL ESTIMATION WITH INTERACTION              ********************
 ********************                          CORRELATION MATRIX OF ESTIMATE                        ********************

            TH 1      TH 2      TH 3      TH 4      TH 5      TH 6      TH 7      OM11      OM12      OM13      OM22      OM23
             OM33      SG11
 TH 1
+        8.91E-01
 TH 2
+        5.25E-01  4.38E-02
 TH 3
+        1.00E-01 -2.34E-01  8.09E-01
 TH 4
+       -2.46E-01 -9.32E-02  2.53E-01  1.57E-02
 TH 5
+        4.35E-02  2.57E-01 -2.59E-01 -1.64E-01  2.24E-02
 TH 6
+        1.93E-01 -1.98E-02 -2.20E-01 -2.66E-01 -3.83E-01  3.66E-03
 TH 7
+       -2.18E-01  7.34E-02 -2.29E-01  9.24E-02  8.27E-02 -2.55E-01  1.70E-03
 OM11
+       -1.15E-01 -1.45E-01  1.65E-01 -1.39E-01 -2.93E-01  2.46E-01 -7.80E-02  1.26E-02
 OM12
+       ......... ......... ......... ......... ......... ......... ......... ......... .........
 OM13
+       ......... ......... ......... ......... ......... ......... ......... ......... ......... .........
 OM22
+       -1.11E-01 -2.32E-02 -1.31E-01 -7.50E-02 -3.66E-01  2.22E-01  7.87E-02  4.25E-01 ......... .........  1.25E-02
 OM23
+       ......... ......... ......... ......... ......... ......... ......... ......... ......... ......... ......... .........
 OM33
+        1.55E-01 -2.96E-01  8.29E-01  2.04E-01 -2.28E-01  5.78E-03 -2.68E-01  2.29E-01 ......... ......... -1.29E-01 .........
          5.58E-01
 SG11
+       ......... ......... ......... ......... ......... ......... ......... ......... ......... ......... ......... .........
         ......... .........
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
 ********************               FIRST ORDER CONDITIONAL ESTIMATION WITH INTERACTION              ********************
 ********************                      EIGENVALUES OF COR MATRIX OF ESTIMATE                     ********************

             1         2         3         4         5         6         7         8         9        10
         1.13E-01  2.57E-01  3.70E-01  5.17E-01  6.62E-01  9.14E-01  1.04E+00  1.73E+00  1.96E+00  2.43E+00

 PROBLEM NO.:         2
 Model simulations
 TOT. NO. OF OBS RECS:      476
 TOT. NO. OF INDIVIDUALS:     74
 PROBLEM NO.:         2     SUBPROBLEM NO.:      1
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 SIMULATION STEP PERFORMED
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 #CPUT: Total CPU Time in Seconds,        6.040
